<?xml version='1.0'?>
<Node name='root' dt='0.05'  gravity='0 0 0'>
	<Node name='Plugins'>
	    <RequiredPlugin name="BeamAdapter"/> <!-- Needed to use components [MultiAdaptiveBeamMapping WireBeamInterpolation WireRestShape] -->
	    <RequiredPlugin name="Sofa.Component.AnimationLoop"/> <!-- Needed to use components [FreeMotionAnimationLoop] -->
	    <RequiredPlugin name="Sofa.Component.Collision.Detection.Algorithm"/> <!-- Needed to use components [BVHNarrowPhase BruteForceBroadPhase DefaultPipeline] -->
	    <RequiredPlugin name="Sofa.Component.Collision.Detection.Intersection"/> <!-- Needed to use components [LocalMinDistance] -->
	    <RequiredPlugin name="Sofa.Component.Collision.Geometry"/> <!-- Needed to use components [LineCollisionModel PointCollisionModel TriangleCollisionModel] -->
	    <RequiredPlugin name="Sofa.Component.Collision.Response.Contact"/> <!-- Needed to use components [DefaultContactManager] -->
	    <RequiredPlugin name="Sofa.Component.Constraint.Lagrangian.Correction"/> <!-- Needed to use components [LinearSolverConstraintCorrection] -->
	    <RequiredPlugin name="Sofa.Component.Constraint.Lagrangian.Solver"/> <!-- Needed to use components [LCPConstraintSolver] -->
	    <RequiredPlugin name="Sofa.Component.Constraint.Projective"/> <!-- Needed to use components [FixedConstraint] -->
	    <RequiredPlugin name="Sofa.Component.IO.Mesh"/> <!-- Needed to use components [MeshOBJLoader] -->
	    <RequiredPlugin name="Sofa.Component.LinearSolver.Direct"/> <!-- Needed to use components [BTDLinearSolver] -->
	    <RequiredPlugin name="Sofa.Component.Mapping.Linear"/> <!-- Needed to use components [IdentityMapping] -->
	    <RequiredPlugin name="Sofa.Component.ODESolver.Backward"/> <!-- Needed to use components [EulerImplicitSolver] -->
	    <RequiredPlugin name="Sofa.Component.SolidMechanics.Spring"/> <!-- Needed to use components [RestShapeSpringsForceField] -->
	    <RequiredPlugin name="Sofa.Component.StateContainer"/> <!-- Needed to use components [MechanicalObject] -->
	    <RequiredPlugin name="Sofa.Component.Topology.Container.Constant"/> <!-- Needed to use components [MeshTopology] -->
	    <RequiredPlugin name="Sofa.Component.Topology.Container.Dynamic"/> <!-- Needed to use components [EdgeSetGeometryAlgorithms EdgeSetTopologyContainer EdgeSetTopologyModifier QuadSetGeometryAlgorithms QuadSetTopologyContainer QuadSetTopologyModifier] -->
	    <RequiredPlugin name="Sofa.Component.Topology.Container.Grid"/> <!-- Needed to use components [RegularGridTopology] -->
	    <RequiredPlugin name="Sofa.Component.Topology.Mapping"/> <!-- Needed to use components [Edge2QuadTopologicalMapping] -->
	    <RequiredPlugin name="Sofa.Component.Visual"/> <!-- Needed to use components [VisualStyle] -->
	    <RequiredPlugin name="Sofa.GL.Component.Rendering3D"/> <!-- Needed to use components [OglModel] -->
	</Node>
    <VisualStyle displayFlags='showVisualModels showBehaviorModels showCollisionModels hideMappings hideForceFields' />
 	<DefaultVisualManagerLoop/>

 	<FreeMotionAnimationLoop />
	<LCPConstraintSolver mu='0.1' tolerance='1e-10' maxIt='1000' build_lcp='false' />

	<DefaultPipeline depth='6' verbose='1' draw='0'/>
	<BruteForceBroadPhase/>
	<BVHNarrowPhase/>
	<LocalMinDistance name='localmindistance' alarmDistance='2' contactDistance='1' angleCone='0.8' coneFactor='0.8' />
	<DefaultContactManager name='Response' response='FrictionContactConstraint' />

<!-- ------------------------- INTERVENTIONAL RADIOLOGY INSTRUMENTS (catheter, guidewire, coil)  ------------------------------ -->

	<Node name='topoLines_cath'>
		<WireRestShape template='Rigid3d' printLog='0' name='catheterRestShape' length='1000.0'  straightLength='600' spireDiameter='4000.0' spireHeight='0.0'
					    densityOfBeams='40 10' numEdges='200' numEdgesCollis='40 20'  youngModulus='10000' youngModulusExtremity='10000'/> <!-- silicone -->
		<EdgeSetTopologyContainer name='meshLinesCath' />
		<EdgeSetTopologyModifier   name='Modifier' />
		<EdgeSetGeometryAlgorithms name='GeomAlgo'   template='Rigid3d' />
		<MechanicalObject template='Rigid3d' name='dofTopo1' />
	</Node>
	<Node name='topoLines_guide'>
		<WireRestShape template='Rigid3d' printLog='0' name='GuideRestShape' length='1000.0'  straightLength='980.0' spireDiameter='25' spireHeight='0.0'
						densityOfBeams='30 5' numEdges='200' numEdgesCollis='50 10'  youngModulus='10000' youngModulusExtremity='10000'/>
		<EdgeSetTopologyContainer name='meshLinesGuide' />
		<EdgeSetTopologyModifier   name='Modifier' />
		<EdgeSetGeometryAlgorithms name='GeomAlgo'   template='Rigid3d' />
		<MechanicalObject template='Rigid3d' name='dofTopo2' />
	</Node>
	<Node name='topoLines_coils'>
		<WireRestShape template='Rigid3d' printLog='0' name='CoilRestShape' length='600.0'  straightLength='540.0' spireDiameter='7' spireHeight='5.0'
						densityOfBeams='40 20' numEdges='400' numEdgesCollis='30 30'  youngModulus='168000' youngModulusExtremity='168000'/>
		<EdgeSetTopologyContainer name='meshLinesCoils' />
		<EdgeSetTopologyModifier   name='Modifier' />
		<EdgeSetGeometryAlgorithms name='GeomAlgo'   template='Rigid3d' />
		<MechanicalObject template='Rigid3d' name='dofTopo3' />
	</Node>


	<Node name='InstrumentCombined'>
		<EulerImplicitSolver rayleighStiffness='0.2' rayleighMass='0.1' printLog='false' />
		<BTDLinearSolver subpartSolve='0' verification='0' verbose='0'/>
		<RegularGridTopology name='meshLinesCombined'
		nx='60' ny='1' nz='1'
		xmin='0.0' xmax='1.0'
		ymin='0' ymax='0'
		zmin='1' zmax='1'
		/>
		<MechanicalObject template='Rigid3d' name='DOFs' showIndices='0' ry='-90'/>

		<WireBeamInterpolation name='InterpolCatheter' WireRestShape='@../topoLines_cath/catheterRestShape' radius='1' printLog='0'/>
		<AdaptiveBeamForceFieldAndMass name='CatheterForceField' interpolation='@InterpolCatheter' massDensity='0.00000155'/> <!--stiff silicone E = 10000 MPa // 1550 Kg/m3-->

		<WireBeamInterpolation name='InterpolGuide' WireRestShape='@../topoLines_guide/GuideRestShape' radius='0.9' printLog='0'/>
		<AdaptiveBeamForceFieldAndMass name='GuideForceField' interpolation='@InterpolGuide' massDensity='0.00000155'/>

		<WireBeamInterpolation name='InterpolCoils' WireRestShape='@../topoLines_coils/CoilRestShape' radius='0.1' printLog='0'/>
		<AdaptiveBeamForceFieldAndMass name='CoilsForceField' interpolation='@InterpolCoils' massDensity='0.000021'/> <!-- platine E = 168000 MPa // 21000 Kg/m3-->

		<InterventionalRadiologyController template='Rigid3d' name='m_ircontroller' printLog='0' xtip='1 0 0'  step='3' rotationInstrument='0 0 0'
							controlledInstrument='0' startingPos='0 0 0 0 -0.7071068 0 0.7071068' speed='2' instruments='InterpolCatheter InterpolGuide InterpolCoils' />

		<LinearSolverConstraintCorrection printLog='false' wire_optimization='true'/>

		<FixedConstraint name='FixedConstraint' indices='0' />
        <RestShapeSpringsForceField  points='@m_ircontroller.indexFirstNode' stiffness='1e8' angularStiffness='1e8'   />

		<Node name='Collis' activated='true'>
				<EdgeSetTopologyContainer name='collisEdgeSet' />
				<EdgeSetTopologyModifier   name='colliseEdgeModifier' />
				<MechanicalObject name='CollisionDOFs'/>
				<MultiAdaptiveBeamMapping  name='collisMap'  controller='../m_ircontroller' useCurvAbs='1' printLog='0'/>
				<LineCollisionModel proximity='0.0' group='1'/>
				<PointCollisionModel proximity='0.0' group='1'/>
		</Node>

		<Node name='VisuCatheter' activated='true'>
			<MechanicalObject name='Quads' />
			<QuadSetTopologyContainer  name='ContainerCath' />
			<QuadSetTopologyModifier   name='Modifier' />
			<QuadSetGeometryAlgorithms name='GeomAlgo'  template='Vec3d' />
			<Edge2QuadTopologicalMapping nbPointsOnEachCircle='10' radius='2' input='@../../topoLines_cath/meshLinesCath' output='@ContainerCath' flipNormals='true'/>

			<AdaptiveBeamMapping  name='VisuMapCath' useCurvAbs='1' printLog='0' interpolation='@../InterpolCatheter' input='@../DOFs' output='@Quads' isMechanical='false'  />

			<Node name='VisuOgl' activated='true'>
				<OglModel name='Visual' color='0.7 0.7 0.7'  quads='@../ContainerCath.quads' material='texture Ambient 1 0.2 0.2 0.2 0.0 Diffuse 1 1.0 1.0 1.0 1.0 Specular 1 1.0 1.0 1.0 1.0 Emissive 0 0.15 0.05 0.05 0.0 Shininess 1 20'/>
				<IdentityMapping input='@../Quads' output='@Visual'/>
			</Node>
		</Node>

		<Node name='VisuGuide' activated='true'>
			<MechanicalObject name='Quads' />
			<QuadSetTopologyContainer  name='ContainerGuide' />
			<QuadSetTopologyModifier   name='Modifier' />
			<QuadSetGeometryAlgorithms name='GeomAlgo'  template='Vec3d' />
			<Edge2QuadTopologicalMapping nbPointsOnEachCircle='10' radius='1' input='@../../topoLines_guide/meshLinesGuide' output='@ContainerGuide'  flipNormals='true' listening='true'/>
			<AdaptiveBeamMapping  name='visuMapGuide' useCurvAbs='1' printLog='0' interpolation='@../InterpolGuide' input='@../DOFs' output='@Quads' isMechanical='false' />
			<Node name='VisuOgl'>
				<OglModel name='Visual' color='0.2 0.2 0.8'  material='texture Ambient 1 0.2 0.2 0.2 0.0 Diffuse 1 1.0 1.0 1.0 1.0 Specular 1 1.0 1.0 1.0 1.0 Emissive 0 0.15 0.05 0.05 0.0 Shininess 1 20' quads='@../ContainerGuide.quads'/>
				<IdentityMapping input='@../Quads' output='@Visual'/>
			</Node>
		</Node>

		<Node name='VisuCoils' activated='true'>
			<MechanicalObject name='Quads'/>
			<QuadSetTopologyContainer  name='ContainerCoils' />
			<QuadSetTopologyModifier   name='Modifier' />
			<QuadSetGeometryAlgorithms name='GeomAlgo'  template='Vec3d' />
			<Edge2QuadTopologicalMapping nbPointsOnEachCircle='10' radius='0.3'  input='@../../topoLines_coils/meshLinesCoils' output='@ContainerCoils'  flipNormals='true' listening='true' />
			<AdaptiveBeamMapping  name='visuMapCoils' useCurvAbs='1' printLog='0' interpolation='@../InterpolCoils' input='@../DOFs' output='@Quads' isMechanical='false' />
			<Node name='VisuOgl'>
				<OglModel name='Visual' color='0.2 0.8 0.2'  material='texture Ambient 1 0.2 0.2 0.2 0.0 Diffuse 1 1.0 1.0 1.0 1.0 Specular 1 1.0 1.0 1.0 1.0 Emissive 0 0.15 0.05 0.05 0.0 Shininess 1 20' quads='@../ContainerCoils.quads'/>
				<IdentityMapping input='@../Quads' output='@Visual'/>
			</Node>
		</Node>
	</Node>


	<!-- <Node name='CollisionModel'>
		<MeshObjLoader name='meshLoader' filename='mesh/phantom.obj' triangulate='true' flipNormals='1'/>
		<MeshTopology position='@meshLoader.position'  triangles='@meshLoader.triangles'/>
		<MechanicalObject name='DOFs1' position='0 0 400' scale='3' ry='90'/>
		<TriangleCollisionModel simulated='0' moving='0'/>
		<LineCollisionModel simulated='0' moving='0'/>
		<PointCollisionModel simulated='0' moving='0'/>
		<OglModel name='Visual' src='@meshLoader' color='1 0 0 0.3' scale='3' ry='90'/>
	</Node> -->


	<Node name="DeformableLiver">

        <VisualStyle displayFlags="showForceFields" />

        <MechanicalObject />
        <UniformMass totalMass="1000.0" />
        <SparseGridTopology n="8 6 6" fileTopology="mesh/liver-smooth.obj" />
        <BoxROI name="box1" box="-2.5 0 -2.5 7.5 3 2" />
        <FixedConstraint indices="@box1.indices"/>
        <HexahedronFEMForceField poissonRatio="0" youngModulus="7000"/>
        <FFDDistanceGridCollisionModel  fileFFDDistanceGrid="mesh/liver-smooth.obj" scale="10000.0" usePoints="0" proximity="0.1" contactStiffness="500.0" contactFriction="0.0" position="100 0 0"/>
        <Node name="Visu">
            <MeshOBJLoader name="meshLoader_0" filename="mesh/liver-smooth.obj" translation="0 0 0" handleSeams="1" scale="10000.0"/>
            <OglModel name="Visual" src="@meshLoader_0" color="red" />
            <BarycentricMapping input="@.." output="@Visual" />
        </Node>
    </Node>


</Node>
